b1 := 10
c1 := 1  # Функция плотности распределения Вейбулла
# Функция распределения Вейбулла
b2 := 15
c2 := 1
b3 := 20
c3 := 1
f(t, b, c) := b/c*(t/c)^(b - 1)*e^(-(t/c)^b)
F(t, b, c) := 1 - e^(-(t/c)^b)
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# Начальные моменты
a2(b, c) := integral(t^2*f(t, b, c), t = 0 .. 100)
a1(b, c) := integral(t*f(t, b, c), t = 0 .. 100)
a3(b, c) := integral(t^3*f(t, b, c), t = 0 .. 100)
# Математическое ожидание
M1(b, c) := a1(b, c)
M2(b, c) := c*Γ(1 + 1/b)
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# Мода
# Медиана
root(d/dt(f(t, b1, c1)), t, 0.001, 1) = 0.989519
root(F(t, b1, c1) - 1/2, t, 0.001, 1) = 0.964012
root(d/dt(f(t, b2, c2)), t, 0.001, 1) = 0.995411
root(F(t, b2, c2) - 1/2, t, 0.001, 1) = 0.975862
root(F(t, b3, c3) - 1/2, t, 0.001, 1) = 0.981841
root(d/dt(f(t, b3, c3)), t, 0.001, 1) = 0.997439
# Дисперсия
D2(b, c) := c^2*(Γ(1 + 2/b) - Γ(1 + 1/b)^2)
D1(b, c) := a2(b, c) - a1(b, c)^2
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# Среднеквадратичное отклонение
σ(b, c) := sqrt(D1(b, c))
σ1 := σ(b1, c1) = 0.114457
σ2 := σ(b2, c2) = 0.0789735  # Третий центральный момент
σ3 := σ(b3, c3) = 0.0603342
# Коэффициент асимметрии
μ(b, c, k) := integral((t - M2(b, c))^k*f(t, b, c), t = 0 .. 100)
S(b, c) := μ(b, c, 3)/σ(b, c)^3
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3
