# Модель Джелинского-Моранды
λ0(i, Kjm, E0) := Kjm*(E0 - (i - 1))
P0(t, i, Kjm, E0) := e^(-Kjm*(E0 - (i - 1))*t)
f0(t, i, Kjm, E0) := Kjm*(E0 - (i - 1))*e^(-Kjm*(E0 - (i - 1))*t)
m0(i, Kjm, E0) := 1/(Kjm*(E0 - (i - 1)))
Kjm1 := 0.01
Kjm2 := 0.02
Kjm3 := 0.03
E1 := 14
E2 := 14
E3 := 17
intervals1 := 1 .. E1
intervals2 := 1 .. E2
intervals3 := 1 .. E3
T1[intervals1] := sum(m0(j - 1, Kjm1, E1), j = 1 .. intervals1)
T1[0] := 0
T2[intervals2] := sum(m0(j - 1, Kjm2, E2), j = 1 .. intervals2)
T2[0] := 0
T3[intervals3] := sum(m0(j - 1, Kjm3, E3), j = 1 .. intervals3)
T3[0] := 0
i(t, Kjm, E0) :=
    i ← 0
    while t > sum(m0(j, Kjm, E0), j = 0 .. i)
        return E0 if i ≥ E0
        i ← i + 1
    i
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# Частота появления ошибок
λ1(t, Kjm, E0) := λ0(i(t, Kjm, E0), Kjm, E0)
λ2(t, Kjm, E0) := λ0(i(t, Kjm, E0), Kjm, E0)
λ3(t, Kjm, E0) := λ0(i(t, Kjm, E0), Kjm, E0)
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# Вероятность безотказной работы
P1(t, Kjm, E0) := P0(t - T1[i(t, Kjm, E0)], i(t, Kjm, E0), Kjm, E0)
P2(t, Kjm, E0) := P0(t - T2[i(t, Kjm, E0)], i(t, Kjm, E0), Kjm, E0)
P3(t, Kjm, E0) := P0(t - T3[i(t, Kjm, E0)], i(t, Kjm, E0), Kjm, E0)
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# Функция плотности
f1(t, Kjm, E0) := f0(t - T1[i(t, Kjm, E0)], i(t, Kjm, E0), Kjm, E0)
f2(t, Kjm, E0) := f0(t - T2[i(t, Kjm, E0)], i(t, Kjm, E0), Kjm, E0)
f3(t, Kjm, E0) := f0(t - T3[i(t, Kjm, E0)], i(t, Kjm, E0), Kjm, E0)
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# Практическая проверка модели Джелинского-Моранды
t0[0] := 6
t0[5] := 10
t0[10] := 18
t0[1] := 7
t0[6] := 9.5
t0[11] := 19
t0[2] := 7
t0[7] := 11.5
t0[12] := 25
t0[3] := 8
t0[8] := 12
t0[13] := 30
t0[4] := 7
t0[9] := 14
t0[14] := 45
intervals := 14
Kjm(E0) := intervals/sum((E0 - j)*t0[j], j = 0 .. intervals - 1)
Es := round(root(sum(1/(E0 - j) - Kjm(E0)*t0[j], j = 0 .. intervals - 1), E0, intervals, 50)) = 16
Kjms := Kjm(Es) = 0.0101266
i0(t) :=
    return Es if t > sum(t0[j], j = 0 .. intervals - 1)
    i ← 0
    while t > sum(t0[j], j = 0 .. i)
        i ← i + 1
    i
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