# Распределение Вейбулла
b1 := 10
c1 := 1
b3 := 20
c3 := 1
b2 := 15
c2 := 1
f(t, b, c) := b/c*(t/c)^(b - 1)*e^(-(t/c)^b)
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F(t, b, c) := 1 - e^(-(t/c)^b)
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# Формула расчёта момента порядка k
M(b, c, k) := integral(t^k*f(t, b, c), t = 0 .. 60)
M13 := M(b3, c3, 1) = 0.973504
# Матожидание
M11 := M(b1, c1, 1) = 0.951351
M12 := M(b2, c2, 1) = 0.965664
# Момент второго порядка
M21 := M(b1, c1, 2) = 0.918169
M22 := M(b2, c2, 2) = 0.938744
M23 := M(b3, c3, 2) = 0.951351
# Дисперсия
D1 := M21 - M11^2 = 0.0131005
D3 := M23 - M13^2 = 0.00364021
D2 := M22 - M12^2 = 0.00623681
# Функциональные зависимости и параметры, полученные с помощью имитации распределения Вейбулла методом обратных функций.
n := 10000
i := 1 .. n
d := 0
g := 1
Y1 := runif(n, d, g)
X11 := (-1*c1^b1*ln(1 - Y1))^(1/b1)
X13 := (-1*c3^b3*ln(1 - Y1))^(1/b3)
X12 := (-1*c2^b2*ln(1 - Y1))^(1/b2)
X21 := sort(X11)
X23 := sort(X11)
X22 := sort(X12)
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bin1 := 40
bin2 := 40
bin3 := 40
lower1 := floor(min(X11))
lower2 := floor(min(X12))
lower3 := floor(min(X13))
upper1 := ceil(max(X11))
upper2 := ceil(max(X12))
upper3 := ceil(max(X13))
h1 := (upper1 - lower1)/bin1
h2 := (upper2 - lower2)/bin2
h3 := (upper3 - lower3)/bin3
j := 1 .. bin1 + 1
q := 1 .. bin2 + 1
w := 1 .. bin3 + 1
int1[j] := lower1 + h1*j
int2[q] := lower2 + h2*q
int3[w] := lower3 + h3*w
t11 := hist(int1, X11)/n
t12 := hist(int2, X12)/n
t13 := hist(int3, X13)/n
int1 := int1 + h1/2
int2 := int2 + h2/2
int3 := int3 + h3/2
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# Сравнение результатов
m1 := sum(X1[i], i = 0 .. n - 1)/n  # error: Эта переменная неопределена.
d1 := sum(X1[i]^2, i = 0 .. n - 1)/n - m1^2  # error: Эта переменная неопределена.
M1 =  # error: Эта переменная неопределена.
D =  # error
