# Исходные данные для статистического анализа
b1 := 1
c1 := 25
b2 := 1
c2 := 20
b3 := 1
c3 := 15
N0 := 10000
d := 0
g := 1
Y := runif(N0, d, g)
X(c, b) := (-1*c^b*ln(1 - Y))^(1/b)
X1 := sort(X(c1, b1))
X2 := sort(X(c2, b2))
# Функция плотности распределения
X3 := sort(X(c3, b3))
N1(t) :=
    i ← 0
    while t > X1[i]
        i ← i + 1
    N0 - i
N2(t) :=
    q ← 0
    while t > X2[q]
        q ← q + 1
    N0 - q
N3(t) :=
    w ← 0
    while t > X3[w]
        w ← w + 1
    N0 - w
f(t, b, c) := b/c*(t/c)^(b - 1)*e^(-(t/c)^b)
# Вероятность отказа
h := 0.5
Q(t, b, c) := integral(f(t, b, c), t = 0 .. t)
T3max := round(max(X3)/h, 0)
T1max := round(max(X1)/h, 0)
T2max := round(max(X2)/h, 0)
w := 0 .. T3max
i := 0 .. T1max
q := 0 .. T2max
T[w] := w*h
T[i] := i*h
T[q] := q*h
w := 0 .. T3max - 1
i := 0 .. T1max - 1
q := 0 .. T2max - 1
P3[w] := N3(T[w])/N0  # Функция надёжности
P1[i] := N1(T[i])/N0
P2[q] := N2(T[q])/N0
P3[T3max] := 0
P(t, b, c) := 1 - Q(t, b, c)
P1[T1max] := 0
P1[T2max] := 0
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# Функция ненадёжности
Q3[w] := (N0 - N3(T[w]))/N0
Q1[i] := (N0 - N1(T[i]))/N0
Q2[q] := (N0 - N2(T[q]))/N0
Q(t, b, c) := integral(f(t, b, c), t = 0 .. t)
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# Функция частоты
i := 0 .. T1max - 2
q := 0 .. T2max - 2
w := 0 .. T3max - 2
f1[i] := (N1(T[i]) - N1(T[i] + h))/(N0*h)
f2[q] := (N2(T[q]) - N2(T[q] + h))/(N0*h)
f3[w] := (N3(T[w]) - N3(T[w] + h))/(N0*h)
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# Функция интенсивности
q := 0 .. T2max - 2
w := 0 .. T3max - 2
i := 0 .. T1max - 2
λ2[q] := (N2(T[q]) - N2(T[q] + h))/(N2(T[q])*h)
λ3[w] := (N3(T[w]) - N3(T[w] + h))/(N3(T[w])*h)
λ1[i] := (N1(T[i]) - N1(T[i] + h))/(N1(T[i])*h)
λ(t, b, c) := f(t, b, c)/P(t, b, c)
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